# Given the following variables:
# Load Applied and Physical Characteristics:
# Uniform Load Applied:
qo := 1
# Radius:
B := 2
L := B
# Modulus of Elasticity:
E := 1
# Area:
A := π*B/4 = 1.5708
# Soil Depth :
z := 1
# Soil Depth :
z := 1
# Soil Embedment Dept:
Df := 0
# Using the Boussinesq relationship, Das, Braja Eq. 5.3, for the increase in stress of a point z due to a loaded circular area:
Δσ := qo*(1 - (1/(1 + (B/(2*z))^2)^(3/2))) = 0.646447  # EQ (3)
# By linear relationships, displacement δz in z is equal to:
δz := Δσ*z/E = 0.646447  # in  # EQ (4)
# By using of soil mechanics equations for soil settlement in the elastic range, we have:
# Using Janbu et al. (1956), modified by Christian and Carrier (1978), with the following values:
B := 2
z := 1
Es := E
# Using of Das, Braja Figures 5.14 to determine the coefficients A1 and A2:
a1 := z/B = 0.5
a2 := Df/B = 0
A1 := 0.25
A2 := 1
# Applying Das, Braja Eq. 5.30:
Se := A1*A2*qo*B/Es = 0.5  # EQ (5)
# Soil Modulus of Elasticity Assumed Equal to 1
# If instead of looking at the pressure distribution we compare our numerical value to the estimated settlement based on the Theory of Elasticity, the displacement, i.e. settlement, of a circular area of soil can be obtained with Equation 5.33 from Das, of which the following terms are based on the settlement at the center of the foundation as:
# Soil Properties:
# Poisson's Ratio:
μs := 0.3
# Additional Variables:
α := 4
Bp := B/2 = 1
pa := 2000  # lb/ft^2
# Values of F1 and F2 can be obtained by using equations mp and np below, by using Table 5.8 and 5.9 in pages 248-251 in the book Foundation Engineering by Das.
mp := L/B = 1
np := 2*z/B = 1
F1 := 0.408
F2 := 0.037
# Shape Factor, Is:
Is := F1 + ((1 - 2*μs)/(1 - μs))*F2 = 0.429143
# The depth factor can be obtained through Table 5.10 in Das:
F2b := Df/B = 0
F2c := B/L = 1
# Consequently:
If := .65
# The soil modulus of elasticity can be determined using Eq. 5.42 from Das. Let's assume it is equal to 1 at this point, and apply Das, Braja Eq. 5.33:
Se2 := qo*α*Bp*Is*If*(1 - μs^2)/Es = 1.01535  # in  # EQ (6)
# From the value obtained with numerical model:
Δz := -0.2494  # ft  # EQ (7)
# If the value determined by the Boussinesq Equation, followed by linear relationships, i.e: EQ 4 is the theoretical correct value this numerical solution yields an error of 54.7% as seen in Eq. (5):
Error := (Δz + δz)/δz = 0.614199  # EQ (6)
# It is necessary to note that the value of E was assumed equal to 1, which is unrealistic when compared to practical values of the soil modulus of elasticity. Hence, the value of theoretical deflection obtained could potentially misrepresent the deflection obtained with the numerical model solution developed, consenquently potentially yielding a smaller error than the one obtained in Eq. (5).
# It is necessary to note that the following assumptions in the calculations above could explain the error obtained with EQ (6):
# If instead of looking at the pressure distribution we compare our numerical value to the estimated settlement based on the Theory of Elasticity, the displacement, i.e. settlement, of a circular area of soil can be obtained with Equation 5.33 from Das, of which the following terms are based on the settlement at the center of the foundation as:
# Soil Properties:
pa := 2000  # lb/ft^2
# Poisson's Ratio:
μs := 0.3
# Additional Variables:
α := 4
Bp := B/2
# Values of F1 and F2 can be obtained by using equations mp and np below, by using Table 5.8 and 5.9 in pages 248-251 in the book Foundation Engineering by Das.
mp := L/B = 1
np := 2*z/B = 1
F1 := 0.408
F2 := 0.037
# Shape Factor, Is:
Is := F1 + ((1 - 2*μs)/(1 - μs))*F2 = 0.429143
# The depth factor can be obtained through Table 5.10 in Das:
F2b := Df/B = 0
F2c := B/L = 1
# Consequently:
If := .65
# The soil moduus of elasticity can be determined using Eq. 5.42 from Das. Let's assume it is equal to 1 at this point:
Es := 1
Se := qo*α*Bp*Is*If*(1 - μs^2)/Es = 1.01535  # in  # Das, Braja Eq. 5.3
# The maximum deflection in a clamped circular plate with a concentrated Center Load:
h := .15
v := .5
D := 1
D := E*h^3/(12*(1 - v^2))
wmax := qo*A*B^2/(16*π*D) = 333.333  # Equation 17.101
