qo := 1
B := 1
z := 2
E := 1
Df := 1
A := 2*π*B = 6.28319
L := B
# Using the Boussinesq relationship for the increase in stress of a point z due to a loaded circular area:
Δσ := qo*(1 - (1/(1 + (B/(2*z))^2)^(3/2))) = 0.0869247  # Das, Braja Eq. 5.3
# By the linear relationships, displacement δz in z is equal to:
δz := Δσ*z/E = 0.173849  # in  # EQ (3)
# From the value obtained with numerical model:
Δz := -0.2494  # in  # EQ (4)
# If the value determined by the Boussinesq (Eq. 5.3) above is the theoretical correct value this numerical solution yields an error of 43.5% as seen in Eq. (5):
Error := (Δz + δz)/δz = -0.434575  # EQ (5)
# It is necessary to note that the value of E was assumed equal to 1, which is unrealistic when compared to practical values of the soil modulus of elasticity. Hence, the value of theoretical deflection obtained could potentially misrepresent the deflection obtained with the numerical model solution developed, consenquently potentially yielding a smaller error than the one obtained in Eq. (5).
a1 := z/B = 2
a2 := Df/B = 1
Es := E
A1 := 0.5
A2 := 0.94
Se := A1*A2*qo*B/Es = 0.47  # Das, Braja Eq. 5.30
# If instead of looking at the pressure distribution we compare our numerical value to the estimated settlement based on the Theory of Elasticity, the displacement, i.e. settlement, of a circular area of soil can be obtained with Equation 5.33 from Das, of which the following terms are based on the settlement at the center of the foundation as:
# Soil Properties:
pa := 2000  # lb/ft^2
# Poisson's Ratio:
μs := 0.3
# Additional Variables:
α := 4
Bp := B/2
# Values of F1 and F2 can be obtained by using equations mp and np below, by using Table 5.8 and 5.9 in pages 248-251 in the book Foundation Engineering by Das.
mp := L/B = 1
np := 2*z/B = 4
F1 := 0.408
F2 := 0.037
# Shape Factor, Is:
Is := F1 + ((1 - 2*μs)/(1 - μs))*F2 = 0.429143
# The depth factor can be obtained through Table 5.10 in Das:
F2b := Df/B = 1
F2c := B/L = 1
# Consequently:
If := .65
# The soil moduus of elasticity can be determined using Eq. 5.42 from Das. Let's assume it is equal to 1 at this point:
Es := 1
Se := qo*α*Bp*Is*If*(1 - μs^2)/Es = 0.507676  # in  # Das, Braja Eq. 5.3
# The maximum deflection in a clamped circular plate with a concentrated Center Load:
h := .15
v := .5
D := E*h^3/(12*(1 - v^2))
D := 1
wmax := qo*A*B^2/(16*π*D) = 0.125  # Equation 17.101
